# Дано :
Jд := 2*10^-3
m := 200
b := 4
c := 10^4
i := 250
r := 0.2
τ := 3*10^-3
kп := 1
s := 0.2
k := 200
Jдпр := Jд*i^2
sпр := s*i^2
rпр := r*i
h(kд, kи) := [0; 0; 0; kи*k]
X(p, kд, kи) := [Φрпр; Xм; Mдпр; U]  # error: Эта переменная не определена.
A(p, kд, kи) := [
    Jдпр*p^2 + b*p + c, -(b*p + c), -1, 0;
    -(b*p + c), m*p^2 + b*p + c, 0, 0;
    sпр*p, 0, τ*p + 1, -rпр;
    (kд*p^2 + kп*p + kи)*k, 0, 0, p
]
|A(p, kд, kи)| → 75.0*p^6 + 25003.9*p^5 + 2911050*p^4 + 5308000*p^3 + 145840000*p^2 + 100016000*p + 40000000
a1(kд, kи) := |A(p, kд, kи)| coeffs, p → [
    100000000*kи;
    40000.0*kи + 100000000;
    100000000*kд + 2000000*kи + 125040000;
    40000.0*kд + 5300000;
    2000000*kд + 2511050;
    25003.9;
    75.0
]
a(kд, kи) := [
    0, 0, 0, 0, 0, 0, 1;
    0, 0, 0, 0, 0, 1, 0;
    0, 0, 0, 0, 1, 0, 0;
    0, 0, 0, 1, 0, 0, 0;
    0, 0, 1, 0, 0, 0, 0;
    0, 1, 0, 0, 0, 0, 0;
    1, 0, 0, 0, 0, 0, 0
]*a1(kд, kи) → [
    75.0;
    25003.9;
    2000000*kд + 2511050;
    40000.0*kд + 5300000;
    100000000*kд + 2000000*kи + 125040000;
    40000.0*kи + 100000000;
    100000000*kи
]
# Матрица Раусса-Гурвица:
Г(kд, kи) := [
    a(kд, kи)[1], a(kд, kи)[3], a(kд, kи)[5], 0, 0, 0;
    a(kд, kи)[0], a(kд, kи)[2], a(kд, kи)[4], a(kд, kи)[6], 0, 0;
    0, a(kд, kи)[1], a(kд, kи)[3], a(kд, kи)[5], 0, 0;
    0, a(kд, kи)[0], a(kд, kи)[2], a(kд, kи)[4], a(kд, kи)[6], 0;
    0, 0, a(kд, kи)[1], a(kд, kи)[3], a(kд, kи)[5], 0;
    0, 0, a(kд, kи)[0], a(kд, kи)[2], a(kд, kи)[4], a(kд, kи)[6]
]
# Определим главные миноры:
Δ3(kд, kи) := det([
    a(kд, kи)[1], a(kд, kи)[3], a(kд, kи)[5], 0, 0, 0;
    a(kд, kи)[0], a(kд, kи)[2], a(kд, kи)[4], 0, 0, 0;
    0, a(kд, kи)[1], a(kд, kи)[3], 0, 0, 0;
    0, 0, 0, 1, 0, 0;
    0, 0, 0, 0, 1, 0;
    0, 0, 0, 0, 0, 1
])
Δ2(kд, kи) := det([
    a(kд, kи)[1], a(kд, kи)[3], 0, 0, 0, 0;
    a(kд, kи)[0], a(kд, kи)[2], 0, 0, 0, 0;
    0, 0, 1, 0, 0, 0;
    0, 0, 0, 1, 0, 0;
    0, 0, 0, 0, 1, 0;
    0, 0, 0, 0, 0, 1
])
Δ5(kд, kи) := det([
    a(kд, kи)[1], a(kд, kи)[3], a(kд, kи)[5], 0, 0, 0;
    a(kд, kи)[0], a(kд, kи)[2], a(kд, kи)[4], a(kд, kи)[6], 0, 0;
    0, a(kд, kи)[1], a(kд, kи)[3], a(kд, kи)[5], 0, 0;
    0, a(kд, kи)[0], a(kд, kи)[2], a(kд, kи)[4], a(kд, kи)[6], 0;
    0, 0, a(kд, kи)[1], a(kд, kи)[3], a(kд, kи)[5], 0;
    0, 0, 0, 0, 0, 1
])
Δ4(kд, kи) := det([
    a(kд, kи)[1], a(kд, kи)[3], a(kд, kи)[5], 0, 0, 0;
    a(kд, kи)[0], a(kд, kи)[2], a(kд, kи)[4], a(kд, kи)[6], 0, 0;
    0, a(kд, kи)[1], a(kд, kи)[3], a(kд, kи)[5], 0, 0;
    0, a(kд, kи)[0], a(kд, kи)[2], a(kд, kи)[4], 0, 0;
    0, 0, 0, 0, 1, 0;
    0, 0, 0, 0, 0, 1
])
# Построим область устойчивости:
D(kд, kи) := Φ(a(kд, kи)[0])*Φ(a(kд, kи)[1])*Φ(a(kд, kи)[2])*Φ(a(kд, kи)[3])*Φ(a(kд, kи)[4])*Φ(a(kд, kи)[5])*Φ(a(kд, kи)[6])*Φ(Δ2(kд, kи))*Φ(Δ3(kд, kи))*Φ(Δ4(kд, kи))*Φ(Δ5(kд, kи))
# [component: inputs D]
D(10, 15) = 1
|A(p, 10, 15)| solve, p → [
    -0.0556504123169 + 7.06954916555i;
    -166.594518758 + 521.801563115i;
    -0.0424974961183 - 1.1540716998i;
    -166.594518758 - 521.801563115i;
    -0.0556504123169 - 7.06954916555i;
    -0.0424974961183 + 1.1540716998i
]
P(p, kд, kи) := a(kд, kи)[0]*p^6 + a(kд, kи)[1]*p^5 + a(kд, kи)[2]*p^4 + a(kд, kи)[3]*p^3 + a(kд, kи)[4]*p^2 + a(kд, kи)[5]*p + a(kд, kи)[6]*p^0
# Построение годографа Михайлова
ω := 0 .. 1
ImP(ω) := a(10, 15)[1]*ω^5 - a(10, 15)[3]*ω^3 + a(10, 15)[5]*ω
ReP(ω) := -a(10, 15)[0]*ω^6 + a(10, 15)[2]*ω^4 + a(10, 15)[6] - a(10, 15)[4]*ω^2
ω := 0, 0.1 .. 5
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ω := 5
R(ω) := sqrt(ImP(ω)^2 + ReP(ω)^2)
ω1 := Minimize(R, ω)
R(ω1) = 107386247
# Исследование переходных процессов
h(kд, kи) := [0; 0; 0; kи*k]
X(p, kд, kи) := A(p, kд, kи)^-1*h(kд, kи)*1/p
# Обратное преобразование Лапласа:
U(p) := X(p, kд, kи) parfrac → [
    1.0/p + (-3.4337716392e36*p - 5.3152445021e38)/(2.5e41*p^2 + 8.29939303239e43*p + 9.57389180759e45) + (2.46811172901e43 - 1.0694419443e40*p)/(6.25e45*p^2 + 4.47129009785e45*p + 3.10618343646e47) + (-4.99992276903e41*p - 3.5028935973e41)/(5e41*p^2 + 3.47102810963e41*p + 1.40111293817e41);
    (-5.02828220962e41*p - 3.50296573301e41)/(5e41*p^2 + 3.47102810963e41*p + 1.40111293817e41) + 1.0/p + (1.03824510198e40 - 6.2948625718e37*p)/(1.25e46*p^2 + 4.1496965162e48*p + 4.78694590379e50) + (1.41411174e41*p + 1.62623673675e41)/(2.5e43*p^2 + 1.78851603914e43*p + 1.24247337458e45);
    (-1.42295582627e41*p - 1.22437434362e41)/(2.5e39*p^2 + 1.78851603914e39*p + 1.24247337458e41) + (-4.42077486444e37*p - 1.45859515544e40)/(1.25e36*p^2 + 4.1496965162e38*p + 4.78694590379e40) + (2.30711079916e42*p + 9.03812927751e39)/(2.5e40*p^2 + 1.73551405482e40*p + 7.00556469087e39);
    (-7.39079084175e36*p - 1.61053697752e39)/(7.8125e37*p^2 + 2.59356032262e40*p + 2.99184118987e42) + (3.0738922027e40*p + 8.75753046352e42)/(1.25e41*p^2 + 8.67757027408e40*p + 3.50278234544e40) + (-3.78273133605e40*p - 1.97128222702e41)/(2.5e41*p^2 + 1.78851603914e41*p + 1.24247337458e43)
]
x(t) := U(p) invlaplace, p → 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
# Графики искомых величин:
t := 0, 0.01 .. 25
kд = 0.2
kи = 0.4
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t := 0, 0.1 .. 100
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# График движущей силы
Fп(t) := b*(d/dt(x(t)[0]) - d/dt(x(t)[1])) + c*(x(t)[0] - x(t)[1])
F(t) := m*d^2/dt^2(x(t)[1])
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kд = 0.2
kи = 0.4
F1(kд, kи) :=
    1 if kи ≤ 0.8*kд + 1.2
    0 otherwise
D1(kд, kи) := D(kд, kи)*F1(kд, kи)
# [component: inputs D1]
U(t) := x(t)[3]
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U1(kд, kи) :=
    1 if kи ≤ 0.7*kд + 2.3
    0 otherwise
D2(kд, kи) := D(kд, kи)*U1(kд, kи)*F1(kд, kи)
# [component: inputs D2]
kд ≡ 0.2
kи ≡ 0.4
J1(kд, kи) := integral((x(t)[1] - 1)^2, t = 0 .. ∞)
J1(kд, kи) = 1.98974
J2(kд, kи) := integral(x(t)[3]^2, t = 0 .. ∞)
J2(kд, kи) = 12616.4
10^-3*J2(kд, kи) = 12.6164
ρ := 5*10^-4
J3(kp, kd) := integral((x(t)[1] - π)^2 + ρ*x(t)[3]^2, t = 0 .. ∞)
J3(kд, kи) =  # error: Это вычисление не приближается к решению.
kд1 := [0.2; 0.3; 0.4; 0.5; 0.6; 0.7]
kи1 := [0.2; 0.2; 0.2; 0.2; 0.2; 0.2]
kи2 := [0.3; 0.3; 0.3; 0.3; 0.3; 0.3]
kи3 := [0.4; 0.4; 0.4; 0.4]
kи4 := [0.5; 0.5; 0.5; 0.5; 0.5]
kи5 := [0.6; 0.6; 0.6; 0.6; 0.6; 0.6]
kд2 := [0.2; 0.3; 0.4; 0.5]
kд3 := [0.3; 0.4; 0.5; 0.6; 0.7]
kи6 := [0.7; 0.7; 0.7; 0.7; 0.7; 0.7]
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