# Коэффициент демпфирования редуктора
b := 4
Жесткость
c := 10^3
Момент инерции приводимого в движение выходного звена
Jm := 1
Момент инерции ротора двигателя
Jd := 2*10^-3
Крутизна механической характеристики
s := 0.2
Собственная постоянная времени двигателя
τ := 0.003
Коэффициент пропорциональности
r := 0.2
# Передаточное отношение редуктора
i := 10
Коэффициент преобразования измерителя угла поворота
k := 10^3
# Приведенный момент инерции ротора двигателя
Jdpr := Jd*i^2 = 0.2
# Приведенный коэффициент пропорциональности
rpr := r*i = 2
# Приведенная крутизна механической характеристики
spr := s*i^2 = 20
A(P, ki, kp) := [
    (Jdpr*P^2 + b*P + c), -(b*P + c), -1, 0;
    -(b*P + c), (Jm*P^2 + b*P + c), 0, 0;
    spr*P, 0, τ*P + 1, -rpr;
    kp*k*P, ki*k, 0, P
]
|A(P, ki, kp)| → 0.0006*P^6 + 0.2144*P^5 + 28.4*P^4 + 7280.0*P^3 + 44000.0*P^2 + 6024000*P + 6000000
a1(ki, kp) := |A(P, ki, kp)| coeffs, P → [2000000*ki; 8000.0*ki + 2000000*kp; 8000.0*kp + 20000.0; 2000.0*kp + 1280.0; 28.4; 0.2144; 0.0006]
a(ki, kp) := [
    0, 0, 0, 0, 0, 0, 1;
    0, 0, 0, 0, 0, 1, 0;
    0, 0, 0, 0, 1, 0, 0;
    0, 0, 0, 1, 0, 0, 0;
    0, 0, 1, 0, 0, 0, 0;
    0, 1, 0, 0, 0, 0, 0;
    1, 0, 0, 0, 0, 0, 0
]*a1(ki, kp) → [0.0006; 0.2144; 28.4; 2000.0*kp + 1280.0; 8000.0*kp + 20000.0; 2000000*kp + 8000.0*ki; 2000000*ki]
Г(ki, kp) := [
    a(ki, kp)[1], a(ki, kp)[3], a(ki, kp)[5], 0, 0, 0;
    a(ki, kp)[0], a(ki, kp)[2], a(ki, kp)[4], a(ki, kp)[6], 0, 0;
    0, a(ki, kp)[1], a(ki, kp)[3], a(ki, kp)[5], 0, 0;
    0, a(ki, kp)[0], a(ki, kp)[2], a(ki, kp)[4], a(ki, kp)[6], 0;
    0, 0, a(ki, kp)[1], a(ki, kp)[3], a(ki, kp)[5], 0;
    0, 0, a(ki, kp)[0], a(ki, kp)[2], a(ki, kp)[4], a(ki, kp)[6]
]
Δ5(ki, kp) := det([
    a(ki, kp)[1], a(ki, kp)[3], a(ki, kp)[5], 0, 0, 0;
    a(ki, kp)[0], a(ki, kp)[2], a(ki, kp)[4], a(ki, kp)[6], 0, 0;
    0, a(ki, kp)[1], a(ki, kp)[3], a(ki, kp)[5], 0, 0;
    0, a(ki, kp)[0], a(ki, kp)[2], a(ki, kp)[4], a(ki, kp)[6], 0;
    0, 0, a(ki, kp)[1], a(ki, kp)[3], a(ki, kp)[5], 0;
    0, 0, 0, 0, 0, 1
])
Δ4(ki, kp) := det([
    a(ki, kp)[1], a(ki, kp)[3], a(ki, kp)[5], 0, 0, 0;
    a(ki, kp)[0], a(ki, kp)[2], a(ki, kp)[4], a(ki, kp)[6], 0, 0;
    0, a(ki, kp)[1], a(ki, kp)[3], a(ki, kp)[5], 0, 0;
    0, a(ki, kp)[0], a(ki, kp)[2], a(ki, kp)[4], 0, 0;
    0, 0, 0, 0, 1, 0;
    0, 0, 0, 0, 0, 1
])
Δ3(ki, kp) := det([
    a(ki, kp)[1], a(ki, kp)[3], a(ki, kp)[5], 0, 0, 0;
    a(ki, kp)[0], a(ki, kp)[2], a(ki, kp)[4], 0, 0, 0;
    0, a(ki, kp)[1], a(ki, kp)[3], 0, 0, 0;
    0, 0, 0, 1, 0, 0;
    0, 0, 0, 0, 1, 0;
    0, 0, 0, 0, 0, 1
])
Δ2(ki, kp) := det([
    a(ki, kp)[1], a(ki, kp)[3], 0, 0, 0, 0;
    a(ki, kp)[0], a(ki, kp)[2], 0, 0, 0, 0;
    0, 0, 1, 0, 0, 0;
    0, 0, 0, 1, 0, 0;
    0, 0, 0, 0, 1, 0;
    0, 0, 0, 0, 0, 1
])
Δ1(ki, kp) := det([
    a(ki, kp)[1], 0, 0, 0, 0, 0;
    0, 1, 0, 0, 0, 0;
    0, 0, 1, 0, 0, 0;
    0, 0, 0, 1, 0, 0;
    0, 0, 0, 0, 1, 0;
    0, 0, 0, 0, 0, 1
])
D(ki, kp) := Φ(a(ki, kp)[0])*Φ(a(ki, kp)[1])*Φ(a(ki, kp)[2])*Φ(a(ki, kp)[3])*Φ(a(ki, kp)[4])*Φ(a(ki, kp)[5])*Φ(a(ki, kp)[6])*Φ(Δ1(ki, kp))*Φ(Δ2(ki, kp))*Φ(Δ3(ki, kp))*Φ(Δ4(ki, kp))*Φ(Δ5(ki, kp))
# [component: inputs D]
# [component: inputs D]
|A(P, 3, 3)| solve, P → [
    -1.00213979045;
    -325.2600894;
    -0.959808319603 - 29.1924228984i;
    -14.5757437519 + 189.072786993i;
    -14.5757437519 - 189.072786993i;
    -0.959808319603 + 29.1924228984i
]
# Годограф Михайлова
1i^2 = -1
ω := 0, 1 .. 100000
|A(p, -3, -2)| → 0.0006*p^6 + 0.2144*p^5 + 28.4*p^4 - 2720.0*p^3 + 4000.0*p^2 - 4024000*p - 6000000
Re(ω) := -0.0006*ω^6 + 28.4*ω^4 - 4000.0*ω^2 + 6000000
Im(ω) := 0.2144*ω^5 - 2720.0*ω^3 + 4024000*ω
ω := 0, 0.1 .. 2
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ω := 0, 0.1 .. 180
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ω := 0, 0.1 .. 300
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ω := 0, 0.1 .. 2000
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D(ki, kp) = 1
h(P, ki, kp) := [0; 0; 0; ki*k]
X(P, ki, kp) := A(P, ki, kp)^-1*h(P, ki, kp)*π/P
X(P, ki, kp) → [
    3000*π*(40000.0*P + 10000.0*P^2 + 10000000)/(P*(30120000000*P + 220000000*P^2 + 36400000*P^3 + 142000.0*P^4 + 1072.0*P^5 + 3.0*P^6 + 30000000000));
    3000*π*(40000.0*P + 10000000)/(P*(30120000000*P + 220000000*P^2 + 36400000*P^3 + 142000.0*P^4 + 1072.0*P^5 + 3.0*P^6 + 30000000000));
    3000*π*(12000000*P^2 + 48000.0*P^3 + 2000.0*P^4)/(P*(30120000000*P + 220000000*P^2 + 36400000*P^3 + 142000.0*P^4 + 1072.0*P^5 + 3.0*P^6 + 30000000000));
    (942477796077*P + 10103361.9739*P^4 + 1338318470.43*P^3 + 28274.3338823*P^5 + 60318578948.9*P^2)/(P*(30120000000*P + 220000000*P^2 + 36400000*P^3 + 142000.0*P^4 + 1072.0*P^5 + 3.0*P^6 + 30000000000))
]
U(p) := X(P, ki, kp) parfrac → [
    -1.57384675446e20/(5e19*P + 5.01069895227e19) + 3.14159265359/P + 2.24068483427e15/(1e18*P + 3.252600894e20) + (2.05128728707e38*P - 4.25037935598e40)/(2.5e40*P^2 + 7.28787187594e41*P + 8.99024277181e44) + (-4.34497866178e40*P - 4.94620212001e42)/(1e43*P^2 + 1.91961663921e43*P + 8.53118786692e45);
    -1.57226140226e20/(5e19*P + 5.01069895227e19) + (4.02600897689e41 - 3.61252780223e38*P)/(5e42*P^2 + 1.45757437519e44*P + 1.79804855436e47) + 3.14159265359/P + (-6.39413058427e12/(1e18*P + 3.252600894e20)) + (3.76099451141e39*P - 4.0377272956e42)/(1.25e42*P^2 + 2.39952079901e42*P + 1.06639848337e45);
    -1.89511509408e20/(5e19*P + 5.01069895227e19) + 4.67337971724e19/(1e18*P + 3.252600894e20) + (5.48840689011e40 - 2.37582777785e38*P)/(5e36*P^2 + 1.45757437519e38*P + 1.79804855436e41) + (4.57298857272e40*P + 2.84362703501e43)/(1e40*P^2 + 1.91961663921e40*P + 8.53118786692e42);
    1.48274357755e21/(5e19*P + 5.01069895227e19) + (-6.72211347837e18/(1e18*P + 3.252600894e20)) + (1.27521694951e40 - 6.15218253685e37*P)/(2.5e36*P^2 + 7.28787187594e37*P + 8.99024277181e40) + (8.37986037391e38*P + 7.26514696525e41)/(5e38*P^2 + 9.59808319603e38*P + 4.26559393346e41)
]  # error: Эта переменная не определена.
x(t) := U(P) invlaplace, P → [
    0.00224068483427*e^(-325.2600894*t) - 3.14769350891*e^(-1.00213979045*t) + 0.00820514914827*cos(189.072786993*t)*e^(-14.5757437519*t) - 0.00962458914772*sin(189.072786993*t)*e^(-14.5757437519*t) - 0.00434497866178*cos(29.1924228984*t)*e^(-0.959808319603*t) - 0.0168005878457*sin(29.1924228984*t)*e^(-0.959808319603*t) + 3.14159265359;
    0.000431438529182*sin(189.072786993*t)*e^(-14.5757437519*t) - 3.14452280451*e^(-1.00213979045*t) - 7.22505560447e-5*cos(189.072786993*t)*e^(-14.5757437519*t) - 6.39413058427e-6*e^(-325.2600894*t) + 0.00300879560913*cos(29.1924228984*t)*e^(-0.959808319603*t) - 0.110750303762*sin(29.1924228984*t)*e^(-0.959808319603*t) + 3.14159265359;
    46733797172408738867*e^(-6505201787998501953*t/20000000000000000)/1000000000000000000 - 1895115094084806853*e^(-50106989522698735561*t/50000000000000000000)/500000000000000000 - 11063310214541168169118463993*e^(-8484199498706518571707420051*t/582076609134674072265625000)*cos(sqrt(12112069289330338183743590723213758230445284772629443157399)*t/582076609134674072265625000)/232830643653869628906250000 + 41591088781551077514450298622*cos(sqrt(1127874072476428508156679248816301599545201981507711973679031)*t/36379788070917129516601562500)*e^(-34917623255878201616724254563*t/36379788070917129516601562500)/9094947017729282379150390625 + 939424999106488659493245739513511769449581460324634303887814*sqrt(1127874072476428508156679248816301599545201981507711973679031)*sin(sqrt(1127874072476428508156679248816301599545201981507711973679031)*t/36379788070917129516601562500)*e^(-34917623255878201616724254563*t/36379788070917129516601562500)/10257954931843673950030999993180572342182149273027898504360846345662139356136322021484375 + 527166333137161334753218498204434388023271808141989907881*sqrt(4037356429776779394581196907737919410148428257543147719133)*sqrt(3)*e^(-8484199498706518571707420051*t/582076609134674072265625000)*sin(sqrt(12112069289330338183743590723213758230445284772629443157399)*t/582076609134674072265625000)/940020296205016643409895921996310215943592660488362358681159093976020812988281250000;
    29.654871551*e^(-1.00213979045*t) - 6.72211347837*e^(-325.2600894*t) - 24.6087301474*cos(189.072786993*t)*e^(-14.5757437519*t) + 28.8754316767*sin(189.072786993*t)*e^(-14.5757437519*t) + 1.67597207478*cos(29.1924228984*t)*e^(-0.959808319603*t) + 49.7190927303*sin(29.1924228984*t)*e^(-0.959808319603*t)
]
# [component: inputs D]
ki ≡ 3
kp ≡ 3
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t := 0, 0.01 .. 20
Mm(t) := b*(d/dt(x(t)[0]) - d/dt(x(t)[1])) + c*(x(t)[0] - x(t)[1])
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t := 0, 0.01 .. 10
Mm(t) := b*(d/dt(x(t)[0]) - d/dt(x(t)[1])) + c*(x(t)[0] - x(t)[1])
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# [component: inputs D]
D(11, 4) = 1
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J1(ki, kp) := integral((x(t)[1] - π)^2, t = 0 .. ∞)
J1(ki, kp) = 4.96033
J2(ki, kp) := integral(x(t)[3]^2, t = 0 .. ∞)
J2(ki, kp) = 1217.76
J3(ki, kp) := integral((x(t)[1] - π)^2 + □*x(t)[3]^2, t = 0 .. ∞)  # error: Пустой местозаполнитель.
J3(ki, kp) =  # error: Эта переменная не определена.
