b := 4
c := 10^3
Jd := 2*10^-3
k := 100
i := 50
r := 0.2
s := 0.2
τ := 3*10^-2
Jм := 1
Jдпр := Jd*i^2 = 5
sпр := s*i^2 = 500
rпр := r*i = 10
A(p, kп, kд) := [
    Jдпр*p^2 + b*p + c, -(b*p + c), -1, 0;
    -(b*p + c), Jм*p^2 + b*p + c, 0, 0;
    sпр*p, 0, τ*p + 1, -rпр;
    k*kд, k*kп, 0, 1
]
h(kп) := [0; 0; 0; k*kп]
|A(p, kп, kд)| → 500000*p + 1000000*kд + 1000000*kп + 1000*p^2*kд + 8000*p^2 + 704*p^3 + 143*p^4/25 + 3*p^5/20 + 4000*p*kд + 4000*p*kп
a1(kп, kд) := |A(p, kп, kд)| coeffs, p → [1000000*kд + 1000000*kп; 4000*kд + 4000*kп + 500000; 1000*kд + 8000; 704; 143/25; 3/20]
a(kп, kд) := [
    0, 0, 0, 0, 0, 1;
    0, 0, 0, 0, 1, 0;
    0, 0, 0, 1, 0, 0;
    0, 0, 1, 0, 0, 0;
    0, 1, 0, 0, 0, 0;
    1, 0, 0, 0, 0, 0
]*a1(kп, kд) → [3/20; 143/25; 704; 1000*kд + 8000; 4000*kд + 4000*kп + 500000; 1000000*kд + 1000000*kп]
a(kп, kд) → [3/20; 143/25; 704; 1000*kд + 8000; 4000*kд + 4000*kп + 500000; 1000000*kд + 1000000*kп]
# =========  Критерий устойчивости Стодолы  =========
# =========  и Рауса-Гурвица  =========
Г(kп, kд) := [
    a(kп, kд)[1], a(kп, kд)[3], a(kп, kд)[5], 0, 0;
    a(kп, kд)[0], a(kп, kд)[2], a(kп, kд)[4], 0, 0;
    0, a(kп, kд)[1], a(kп, kд)[3], a(kп, kд)[5], 0;
    0, a(kп, kд)[0], a(kп, kд)[2], a(kп, kд)[4], 0;
    0, 0, a(kп, kд)[1], a(kп, kд)[3], a(kп, kд)[5]
]
Δ5(kп, kд) := det([
    a(kп, kд)[1], a(kп, kд)[3], a(kп, kд)[5], 0, 0;
    a(kп, kд)[0], a(kп, kд)[2], a(kп, kд)[4], 0, 0;
    0, a(kп, kд)[1], a(kп, kд)[3], a(kп, kд)[5], 0;
    0, a(kп, kд)[0], a(kп, kд)[2], a(kп, kд)[4], 0;
    0, 0, a(kп, kд)[1], a(kп, kд)[3], a(kп, kд)[5]
])
Δ4(kп, kд) := det([
    a(kп, kд)[1], a(kп, kд)[3], a(kп, kд)[5], 0, 0;
    a(kп, kд)[0], a(kп, kд)[2], a(kп, kд)[4], 0, 0;
    0, a(kп, kд)[1], a(kп, kд)[3], a(kп, kд)[5], 0;
    0, a(kп, kд)[0], a(kп, kд)[2], a(kп, kд)[4], 0;
    0, 0, 0, 0, 1
])
Δ3(kп, kд) := det([
    a(kп, kд)[1], a(kп, kд)[3], a(kп, kд)[5], 0, 0;
    a(kп, kд)[0], a(kп, kд)[2], a(kп, kд)[4], 0, 0;
    0, a(kп, kд)[1], a(kп, kд)[3], 0, 0;
    0, 0, 0, 1, 0;
    0, 0, 0, 0, 1
])
Δ2(kп, kд) := det([
    a(kп, kд)[1], a(kп, kд)[3], 0, 0, 0;
    a(kп, kд)[0], a(kп, kд)[2], 0, 0, 0;
    0, 0, 1, 0, 0;
    0, 0, 0, 1, 0;
    0, 0, 0, 0, 1
])
D(kп, kд) := Φ(a(kп, kд)[0])*Φ(a(kп, kд)[1])*Φ(a(kп, kд)[2])*Φ(a(kп, kд)[3])*Φ(a(kп, kд)[4])*Φ(a(kп, kд)[5])*Φ(Δ2(kп, kд))*Φ(Δ3(kп, kд))*Φ(Δ4(kп, kд))*Φ(Δ5(kп, kд))
# [component: inputs D]
kп := 0.7
kд := 0.1
Пусть
D(kп, kд) = 1
|A(p, kп, kд)| solve, p → [
    -1.62646443408;
    -2.43135013311 - 30.2578453241i;
    -2.43135013311 + 30.2578453241i;
    -15.8220843165 + 57.5177631952i;
    -15.8220843165 - 57.5177631952i
]
# =========  Годограф Михайлова =========
ReP(ω) := a(kп, kд)[1]*ω^4 - a(kп, kд)[3]*ω^2 + a(kп, kд)[5]
ImP(ω) := ω*(a(kп, kд)[0]*ω^4 - a(kп, kд)[2]*ω^2 + a(kп, kд)[4])
ω := 0, 0.001 .. 400
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ω := 0, 0.001 .. 70
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# =========  Обратное преобразование Лапласа =========
Fi := π
A(p, kп, kд) := [
    Jдпр*p^2 + b*p + c, -(b*p + c), -1, 0;
    -(b*p + c), Jм*p^2 + b*p + c, 0, 0;
    sпр*p, 0, τ*p + 1, -rпр;
    k*kд*p, k*kп, 0, 1
]
h(p, kп, kд) := [0; 0; 0; k*kп]
X(p, kп, kд) := A(p, kп, kд)^-1*h(p, kп, kд)*Fi/p
X(p, kп, kд) → [
    (879645.943005*p + 219911.485751*p^2 + 219911485.751)/(p*(60280000*p + 840000.0*p^2 + 80400.0*p^3 + 572.0*p^4 + 15.0*p^5 + 70000000));
    (879645.943005*p + 219911485.751)/(p*(60280000*p + 840000.0*p^2 + 80400.0*p^3 + 572.0*p^4 + 15.0*p^5 + 70000000));
    (1099557.42876*p^4 + 1319468914.51*p^2 + 5277875.65803*p^3)/(p*(60280000*p + 840000.0*p^2 + 80400.0*p^3 + 572.0*p^4 + 15.0*p^5 + 70000000));
    (10995574287.6*p + 175929188.601*p^2 + 3298.67228627*p^5 + 15481768.5969*p^3 + 125789.36985*p^4)/(p*(60280000*p + 840000.0*p^2 + 80400.0*p^3 + 572.0*p^4 + 15.0*p^5 + 70000000))
]
U(p) := X(p, kп, kд) parfrac → [
    (7.82135785858e38*p - 3.0308342709e40)/(1.25e41*p^2 + 5.74686071313e41*p + 1.16969550992e44) + 3.14159265359/p + (3.04738695188e38*p - 3.34773079908e40)/(1.25e40*p^2 + 4.04467633132e41*p + 5.28991481571e43) + (-3.17222883549e20/(1e20*p + 1.17843411229e20));
    (6.76746886911e39 - 1.3969097741e38*p)/(1.25e40*p^2 + 4.04467633132e41*p + 5.28991481571e43) + 3.14159265359/p + (-3.16780884263e20/(1e20*p + 1.17843411229e20)) + (4.67393340438e38*p - 5.58018466658e40)/(1.25e40*p^2 + 5.74686071313e40*p + 1.16969550992e43);
    -2.64256394435e21/(1e20*p + 1.17843411229e20) + (7.89266401039e38*p + 8.69246454998e41)/(1.25e37*p^2 + 4.04467633132e38*p + 5.28991481571e40) + (1.40181519693e42 - 9.17891815989e39*p)/(2.5e38*p^2 + 1.14937214263e39*p + 2.33939101984e41);
    1.84363992267e22/(1e20*p + 1.17843411229e20) + (4.4315699934e38*p + 1.24226110879e40)/(1.25e37*p^2 + 4.04467633132e38*p + 5.28991481571e40) + (2.37333842886e39*p + 9.2760356802e42)/(2.5e40*p^2 + 1.14937214263e41*p + 2.33939101984e43)
]
x(t) := U(p) invlaplace, p → [
    0.024379095615*cos(63.0093750689*t)*e^(-16.1787053253*t) - 3.17222883549*e^(-1.17843411229*t) - 0.0487642805528*sin(63.0093750689*t)*e^(-16.1787053253*t) + 0.00625708628687*cos(30.503642121*t)*e^(-2.29874428525*t) - 0.00842031197446*sin(30.503642121*t)*e^(-2.29874428525*t) + 3.14159265359;
    0.0114617712293*sin(63.0093750689*t)*e^(-16.1787053253*t) - 0.0111752781928*cos(63.0093750689*t)*e^(-16.1787053253*t) - 3.16780884263*e^(-1.17843411229*t) + 0.037391467235*cos(30.503642121*t)*e^(-2.29874428525*t) - 0.149165831963*sin(30.503642121*t)*e^(-2.29874428525*t) + 3.14159265359;
    22970675521025531346094794571*e^(-47086229679616259000031277537*t/2910383045673370361328125000)*cos(sqrt(33628744071169274234464212509681197812362002418215679213631)*t/2910383045673370361328125000)/363797880709171295166015625 - 1321281972176187489*e^(-5892170561442442433*t/5000000000000000000)/50000000000000000 - 66785419475434532483632210642*cos(sqrt(788140595205306551328741071859397898146189385765248789894599)*t/29103830456733703613281250000)*e^(-66902263941322197340195998549*t/29103830456733703613281250000)/1818989403545856475830078125 + 72546436163255821986200897408783628349118769846257298148373*sqrt(33628744071169274234464212509681197812362002418215679213631)*e^(-47086229679616259000031277537*t/2910383045673370361328125000)*sin(sqrt(33628744071169274234464212509681197812362002418215679213631)*t/2910383045673370361328125000)/12234065824002491075394286784896829999474722141973208349966080277226865291595458984375 + 100438003400638303605957977068625664444910490998938498119486*sqrt(262713531735102183776247023953132632715396461921749596631533)*sqrt(3)*sin(sqrt(788140595205306551328741071859397898146189385765248789894599)*t/29103830456733703613281250000)*e^(-66902263941322197340195998549*t/29103830456733703613281250000)/477873130394258957996948127316741434179487372460697946065070937038399279117584228515625;
    9218199613347694413*e^(-5892170561442442433*t/5000000000000000000)/50000000000000000 + 34536619624961011442064773291*e^(-104534787408315933344056247732*t/45474735088646411895751953125)*cos(4*sqrt(120260710938309715473745891093474779138223064170911040303511)*t/45474735088646411895751953125)/363797880709171295166015625000 + 10318052939598371409112587571*e^(-47086229679616259000031277537*t/2910383045673370361328125000)*cos(sqrt(33628744071169274234464212509681197812362002418215679213631)*t/2910383045673370361328125000)/291038304567337036132812500 + 355950660030567404057411371151959421874843287405082307373*sqrt(33628744071169274234464212509681197812362002418215679213631)*e^(-47086229679616259000031277537*t/2910383045673370361328125000)*sin(sqrt(33628744071169274234464212509681197812362002418215679213631)*t/2910383045673370361328125000)/9787252659201992860315429427917463999579777713578566679972864221781492233276367187500 + 1533688805655098479962104115026431636817668534916750321768497*sqrt(120260710938309715473745891093474779138223064170911040303511)*e^(-104534787408315933344056247732*t/45474735088646411895751953125)*sin(4*sqrt(120260710938309715473745891093474779138223064170911040303511)*t/45474735088646411895751953125)/43750591771935329406458873961482742429588348084839177428334005526266992092132568359375000
]
# [component: inputs D]
kп = 0.7
kд = 0.1
t1max := 200
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t2max := 2
t0max := 5
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t3max := 2
t1max := 5
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Mп(t) := b*(d/dt(x(t)[0]) - d/dt(x(t)[1])) + c*(x(t)[0] - x(t)[1])
kп = 0.7
kд = 0.1
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t := 0.001
tmax := Maximize(Mп, t)
tmax = 0.0623134
Mп(tmax) = 129.355
t := 0, 0.001 .. 5
Uvh(t) := x(t)[3]
kп = 0.7
kд = 0.1
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t := 0.001
tmax := Maximize(Uvh, t)
tmax = 2.48256e-11
Uvh(tmax) = 219.911
# ================  Окончательная облачть  ================
# у-ие полученное из Excel для
# <=  линии тренда вида: Кд(Кп)
# Начальная область
U(kп, kд) :=
    1 if kд ≥ 1.2*kп + 2
    0 otherwise
# [component: inputs D]
# <= 0 во всех остальных случаях
U(kп, kд) = 0
D1(kп, kд) := D(kп, kд)*U(kп, kд)  # <= Домножаем начальную область на  функцию ограничения
# [component: inputs D1]
# <= Окончательная область, из которой вырезана область, неудовлетворяющая критериям
J1(kп, kд) := integral((x(t)[1] - π)^2, t = 0 .. ∞)
J1(kп, kд) = 4.28914
J2(kп, kд) := integral(x(t)[3]^2, t = 0 .. ∞)
J2(kп, kд) = 14690.7
J3(kп, kд) := integral((x(t)[1] - π)^2 + 10*x(t)[3]^2, t = 0 .. ∞)
J3(kп, kд) = 146912
